° ≡ π/180
∠(mag, ang) := mag*(cos(ang*°) + 1j*sin(ang*°))
# dc componatn of the signal a0
# over one repetitation
# because otherweise
/∠(z) := [|z|, if(|z| > 10^-8, arg(z)/°, 0)]
# Reconstruction normally
#
# can do it from can go from 0 to infinity
#
# page 1.2 fourier series
#
# negative infinity thing is
#
# adding the conjugate signal for real valued time signals
# adding a conjugate siggal g
#
# An and b sub ns here these are two components that ar workign togehter to reflect
# not only because bothat the same frequcy 2pi n n is bay 0 this one n is 0 goes away
#
# if n is zero
#
# a0 is the r\ dc value  a0 is the dc value
# reconsturciont fomrula
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sign(sie)
even(n) := mod(n, 2) == 1
odd(n) := |mod(n, 2)| == 1
xx := 3 + 4j
n := 1 .. 15
xxx := 5 ∠ 45
xxx = 3.53553 + 3.53553j
a[n] := (2*n)
a[2] = 4
xx = 3 + 4j
xxx = [5, 45] ∠
a[0] := 1/2
B[n] := 2*even(n)/(n*π)
ν[0] := 2
F(t) := a[0] + sum(a[n]*cos(t*2*π*n*ν[0]) + B[n]*sin(t*2*π*n*ν[0]), n)
# two arrays valid idea same idnex  other thign is cause doubels in mipsym arelreayd 8 bytes
# when idnxing into an array your already shipfitng the number over index over to 8 bytss at a time
#
# actually using as a16 bytes objects
# real first
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# might be gonan wanna put them clookup table
# complex vlau ein an arry with n that are powers of 2
# algo can have a lookup table for that value avoids doign eenth te sine and cosine whihc means that woudltn need to use the extneion mipsym extneiosn  can cluclate those trig funciotns
# gonna code this whole thing in mipsym  program in c++ first efiient algorhtm in c++ before twe convert we can built this table  of agnles start off with 90 degrees divide those in half 45 22.5 11.25 degrees this table just containst thjese values that are W and powers foiled complex do them in other words mjulitiplied the w times its sel fif you got w 3 and want w4 take  just a complex mutlipcliation is a foiled operaiton  probably need a amcro for compelx multiclaiton  negative agnels to get fft that we want
