# Phasor conversions
° ≡ π/180
deg ≡ °  # mag and ang are doubles not complex
∠(mag, ang) := mag*(cos(ang*°) + 1j*sin(ang*°))
/∠(cval) := [|cval|, if(|cval| > 10^-8, arg(cval)/°, 0)]
arg(z) := if(|z| > 10^-8, arg(z), -4)
N := 4
i := 0 .. N - 1
j := 0 .. N - 1
ω := e^(-1j*2*π/N)
# Columns are orthogonal
F_N[i, j] := ω^(i*j)
F_N = [
    [1, 0], [1, 0], [1, 0], [1, 0];
    [1, 0], [1, -90], [1, -180], [1, 90];
    [1, 0], [1, -180], [1, 1.4033e-14], [1, -180];
    [1, 0], [1, 90], [1, -180], [1, -90]
] ∠
F_N = [1, 1, 1, 1; 1, -1j, -1, 1j; 1, -1, 1, -1; 1, 1j, -1, -1j]
Fin := F_N^-1
conj(transpose(F_N[:, 1]))*F_N[:, 3] = -2.44921e-16j
D := [1; 2; 1; 0]
F_N*D = [4; -2j; 0; 2j]
D = [1; 2; 1; 0]
CFFT(D)*4 = [4; -2j; 0; 2j]
length(D) = 4
myFFT(P) :=
    n ← length(P)
    n2 ← n/2
    if n == 1
        {
            return P
        }
    ω ← e^(-1j*2*π/n)
    for i ∈ 0 .. n2 - 1
        P_e[i] ← P[2*i]
        P_o[i] ← P[2*i + 1]
    y_e ← myFFT(P_e)
    y_o ← myFFT(P_o)
    y[n - 1] ← 0
    ωj ← 1
    for j ∈ 0 .. n2 - 1
        y[j] ← y_e[j] + ωj*y_o[j]
        y[j + n2] ← y_e[j] - ωj*y_o[j]
        ωj ← ωj*ω
    return y/2
# chantge whole thread use uncidoe buffer isntead of ascii
# and have to trnslate the ascii thats is sent to into unicode at the point of the
# syscall
N*Fin = [
    [1, 1.59028e-14], [1, -1.27222e-14], [1, 0], [1, 0];
    [1, 0], [1, 90], [1, 180], [1, -90];
    [1, -1.90833e-14], [1, 180], [1, -1.90833e-14], [1, 180];
    [1, 0], [1, -90], [1, 180], [1, 90]
] ∠
conj(N*Fin) - F_N = [
    -2.77556e-16j, 2.22045e-16j, 5.55112e-17j, -1.11022e-16;
    2.22045e-16, -1.72253e-16, 3.33067e-16 + 1.22461e-16j, -3.15909e-16;
    2.22045e-16 + 3.33067e-16j, 1.11022e-16 - 9.9584e-17j, -2.22045e-16 + 8.81456e-17j, -7.67073e-17j;
    -2.22045e-16 + 1.66533e-16j, -1.49376e-16 - 1.11022e-16j, 8.98261e-17j, 4.03865e-18 + 2.22045e-16j
]
# ∟
FFT(D) =  # error: This vector should have more elements.
myFFT(D) = [1; -0.5j; 0; 0.5j]
(a + 1j*b)/(c + 1j*d) expand → a/(c + d*1j) + (b/(c + d*1j))*1j
F_N^-1*F_N = [
    1, -1.01434e-16, 2.77556e-17 + 4.9792e-17j, 1.37768e-16 + 2.77556e-17j;
    -4.16334e-17, 1, 2.57959e-16 - 6.12303e-17j, 5.29904e-18j;
    0, 1.01434e-16 - 5.55112e-17j, 1, 8.42764e-17 - 5.55112e-17j;
    2.77556e-17j, 5.55112e-17 + 8.04071e-17j, -7.75476e-17 - 5.71917e-18j, 1
]
numer(a/(c + d*1j) + (b/(c + d*1j))*1j) → a*c + b*d - a*d*1j + b*c*1j
denom*(a/(c + d*1j) + (b/(c + d*1j))*1j) → denom*(a/(c + d*1j) + (b/(c + d*1j))*1j)
d := 0 = 0
f(t) := 3*cos(2*π*20*Hz*t + 30*°) + 4*cos(2*π*30*Hz*t + 45*°) + 2*cos(2*π*60*Hz*t + 120*°) + 5
gcd(20, 30, 60) = 10
T := 1/(10 Hz) = 100 ms
N := 2^4
n := 0 .. N - 1
Δt := T/N
d[n] := f(n*Δt)
f_s := 1/Δt = 160 Hz
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FFT(d) = [
    [5, 0]; [1.90779e-12, 0]; [1.5, 30]; [2, 45]; [9.93014e-16, 0]; [1.34907e-12, 0]; [1, 120]; [1.98637e-12, 0]; [1.33227e-15, 0]
] ∠
f_0 := 1/T
F := CFFT(d) = [
    [5, 0]; [8.89911e-16, 0]; [1.5, 30]; [2, 45]; [1.11022e-15, 0]; [7.4476e-16, 0]; [1, 120]; [1.0721e-15, 0]; [8.88178e-16, 0]; [1.19187e-15, 0]; [1, -120]; [7.02167e-16, 0]; [1.11022e-15, 0]; [2, -45]; [1.5, -30]; [9.69461e-16, 0]
] ∠
myFFT(d) = [
    [5, 0]; [9.11324e-16, 0]; [1.5, 30]; [2, 45]; [1.11022e-15, 0]; [6.47366e-16, 0]; [1, 120]; [1.35858e-15, 0]; [8.88178e-16, 0]; [1.10324e-15, 0]; [1, -120]; [8.45521e-16, 0]; [1.11022e-15, 0]; [2, -45]; [1.5, -30]; [7.479e-16, 0]
] ∠
FF := recenter(F)
F[.*N] = 5
F[.*N] = 5
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F_N = [
    [1, 0], [1, 0], [1, 0], [1, 0];
    [1, 0], [1, -90], [1, -180], [1, 90];
    [1, 0], [1, -180], [1, 1.4033e-14], [1, -180];
    [1, 0], [1, 90], [1, -180], [1, -90]
] ∠
F_N = [1, 1, 1, 1; 1, -1j, -1, 1j; 1, -1, 1, -1; 1, 1j, -1, -1j]
F_N
F_N
