∠(mag, ang) := mag*(cos(ang*π/180) + 1j*sin(ang*π/180))
tri(θ) := (θ + π/2)/(π/2)
1
/∠(cval) := [|cval|, if(cval ≠ 0, arg(cval)*180/π, 0)]
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phasor := "∠"
phasor = "∠"
||(a, b) := a*b/(a + b)
±(a, b) := [a + b; a - b]
T := 2*π
aa(k) := 2/T*integral(tri(t)*cos(t*2*π/T*k), t = -T/2 .. 0) assume, k == integer → -(2*sin(π*k)/k - 4*sin(π*k/2)^2/(π*k^2))/π
tri(θ) := ||mod(θ, 2*π)/π| - 1|*2 - 1
aaa(k) := 4/(π^2*k^2)
k := 1 .. 20
a[k] := 2/T*integral(tri(t)*cos(t*2*π/T*k), t = -T/2 .. T/2)
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aaa(1) = 0.405285
aaa(3) = 0.0450316
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a[1] = 0.810569
a[6] = -2.90462e-16
a[3] = 0.0900633
a[5] = 0.0324228
b[k] := 1/T*integral(tri(t)*sin(t*2*π/T*k), t = -T/2 .. T/2)
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f(t) := sum(a[k]*cos(2*π/T*k*t), k)
a[1] = 8 1/π^2
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f(t) := 6.25*cos(10*2*π*t + 60 °) + 7.5*cos(19*2*π*t - 45 °) + 4.35*cos(1*(2*π)*t + 30 °) + 2
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T := 20
f_0 := 1/T = 0.05
f(0) = 14.1955
f(1) = 14.1955
k := -400 .. 400
ang(z) := if(|z| > 10^-10, arg(z)*180/π, -200)
X[k + 400] := 1/T*integral(f(t)*e^(-1j*2*π/T*t*k), t = 0 .. T)
X[20 + 400] = [2.175, 30] ∠
X[400 - 20] = [2.175, -30] ∠
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X[200 + 400] = [3.125, 60] ∠
X[400] = 2
X[380 + 400] = [3.75, -45] ∠
f_2(t) := sum(X[k + 400]*e^(1j*2*π/T*k*t), k)
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filter
H(s) := 1/(2*π + s)
X[20 + 400]*H(1j*1*2*π) = [0.244773, -15] ∠
X[380]
X[20 + 400] = [2.175, 30] ∠
G[k + 400] := H(1j*k*2*π/T)
G[400] = 0.159155
g(t) := 2*|X[20 + 400]*G[20 + 400]|*cos(20*2*π/T*t + arg(X[20 + 400]*G[20 + 400])) + 2*|X[200 + 400]*G[200 + 400]|*cos(200*2*π/T*t + arg(X[200 + 400]*G[200 + 400])) + 2*|X[380 + 400]*G[380 + 400]|*cos(380*2*π/T*t + arg(X[380 + 400]*G[380 + 400])) + 2*G[400]
ggg(t) := sum(X[k + 400]*G[k + 400]*e^(1j*2*π/T*k*t), k)
gg(t) := sum(|X[k + 400]*G[k + 400]|*cos(k*2*π/T*t + arg(X[k + 400]*G[k + 400])), k)
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2*|X[20 + 400]*G[20 + 400]| = 0.489547
2*|X[600]*G[600]| = 0.0989782
2*|X[780]*G[780]| = 0.0627375
arg(X[420]*G[420]) = -15 deg
arg(X[600]*G[600]) = -24.2894 deg
arg(X[780]*G[780]) = -131.987 deg
g(t) := 0.4895*cos(1*2*π*t + (-15 °)) + 0.099*cos(10*2*π*t + (-24.29 °)) + 0.063*cos(19*2*π*t + (-132 °)) + .318
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