# Phasor conversions
° ≡ π/180
deg ≡ °  # mag and ang are doubles not complex
∠(mag, ang) := mag*(cos(ang*°) + 1j*sin(ang*°))
/∠(cval) := [|cval|, if(|cval| > 10^-8, arg(cval)/°, 0)]
arg(z) := if(|z| > 10^-8, arg(z), -4)
N := 8
i := 0 .. N - 1
j := 0 .. N - 1
ω := e^(-1j*2*π/N)
# Columns are orthogonal
F_N[i, j] := ω^(i*j)
F_N = [
    [1, 0], [1, 0], [1, 0], [1, 0], [1, 0], [1, 0], [1, 0], [1, 0];
    [1, 0], [1, -45], [1, -90], [1, -135], [1, -180], [1, 135], [1, 90], [1, 45];
    [1, 0], [1, -90], [1, -180], [1, 90], [1, 5.08889e-14], [1, -90], [1, -180], [1, 90];
    [1, 0], [1, -135], [1, 90], [1, -45], [1, -180], [1, 45], [1, -90], [1, 135];
    [1, 0], [1, -180], [1, 5.08889e-14], [1, -180], [1, 1.01778e-13], [1, -180], [1, 1.52667e-13], [1, -180];
    [1, 0], [1, 135], [1, -90], [1, 45], [1, -180], [1, -45], [1, 90], [1, -135];
    [1, 0], [1, 90], [1, -180], [1, -90], [1, 1.52667e-13], [1, 90], [1, -180], [1, -90];
    [1, 0], [1, 45], [1, 90], [1, 135], [1, -180], [1, -135], [1, -90], [1, -45]
] ∠
F_N = [
    1, 1, 1, 1, 1, 1, 1, 1;
    1, 0.707107 - 0.707107j, -1j, -0.707107 - 0.707107j, -1, -0.707107 + 0.707107j, 1j, 0.707107 + 0.707107j;
    1, -1j, -1, 1j, 1, -1j, -1, 1j;
    1, -0.707107 - 0.707107j, 1j, 0.707107 - 0.707107j, -1, 0.707107 + 0.707107j, -1j, -0.707107 + 0.707107j;
    1, -1, 1, -1, 1, -1, 1, -1;
    1, -0.707107 + 0.707107j, -1j, 0.707107 + 0.707107j, -1, 0.707107 - 0.707107j, 1j, -0.707107 - 0.707107j;
    1, 1j, -1, -1j, 1, 1j, -1, -1j;
    1, 0.707107 + 0.707107j, 1j, -0.707107 + 0.707107j, -1, -0.707107 - 0.707107j, -1j, 0.707107 - 0.707107j
]
Fin := F_N^-1
conj(transpose(F_N[:, 1]))*F_N[:, 3] = -8.88178e-16 - 7.21645e-16j
D := [1; 2; 1; 0]
F_N*D =  # error: These array dimensions do not match.
D = [1; 2; 1; 0]
CFFT(D)*4 = [4; -2j; 0; 2j]
length(D) = 4
myFFT(P) :=
    n ← length(P)
    n2 ← n/2
    if n == 1
        {
            return P
        }
    ω ← e^(-1j*2*π/n)
    for i ∈ 0 .. n2 - 1
        P_e[i] ← P[2*i]
        P_o[i] ← P[2*i + 1]
    y_e ← myFFT(P_e)
    y_o ← myFFT(P_o)
    y[n - 1] ← 0
    ωj ← 1
    for j ∈ 0 .. n2 - 1
        y[j] ← y_e[j] + ωj*y_o[j]
        y[j + n2] ← y_e[j] - ωj*y_o[j]
        ωj ← ωj*ω
    return y/2
# chantge whole thread use uncidoe buffer isntead of ascii
# and have to trnslate the ascii thats is sent to into unicode at the point of the
# syscall
N*Fin = [
    [1, 5.89259e-14], [1, 7.31528e-14], [1, 2.54444e-14], [1, 3.49861e-14], [1, 0], [1, -2.07592e-14], [1, -6.36111e-14], [1, -1.145e-13];
    [1, 3.18055e-14], [1, 45], [1, 90], [1, 135], [1, 180], [1, -135], [1, -90], [1, -45];
    [1, 3.81667e-14], [1, 90], [1, 180], [1, -90], [1, -5.725e-14], [1, 90], [1, 180], [1, -90];
    [1, 0], [1, 135], [1, -90], [1, 45], [1, 180], [1, -45], [1, 90], [1, -135];
    [1, -1.17576e-14], [1, 180], [1, -4.79013e-14], [1, 180], [1, -1.145e-13], [1, 180], [1, -1.74931e-13], [1, 180];
    [1, -2.54444e-14], [1, -135], [1, 90], [1, -45], [1, 180], [1, 45], [1, -90], [1, 135];
    [1, -8.90555e-14], [1, -90], [1, 180], [1, 90], [1, -1.7175e-13], [1, -90], [1, 180], [1, 90];
    [1, -9.54166e-14], [1, -45], [1, -90], [1, -135], [1, 180], [1, 135], [1, 90], [1, 45]
] ∠
conj(N*Fin) - F_N = [
    -1.11022e-15 - 1.02845e-15j, -1.27676e-15j, -4.44089e-16j, 6.66134e-16 - 6.10623e-16j, 2.22045e-16 - 1.11022e-16j, 8.88178e-16 + 3.62316e-16j, 6.66134e-16 + 1.11022e-15j, -8.88178e-16 + 1.9984e-15j;
    -5.55112e-16 - 5.55112e-16j, 2.22045e-16 - 3.33067e-16j, 2.22045e-16 - 2.22045e-16j, 5.55112e-16 + 2.22045e-16j, 0, 2.22045e-16 + 1.11022e-16j, 3.98919e-16, 1.22125e-15j;
    4.44089e-16 - 6.66134e-16j, 1.11022e-16 + 2.22045e-16j, 1.11022e-16, 2.77556e-16 - 2.22045e-16j, 2.22045e-16 + 1.11022e-16j, -5.44137e-17 + 4.44089e-16j, 3.33067e-16, -3.33067e-16 + 8.88178e-16j;
    1.55431e-15, 3.33067e-16 + 6.66134e-16j, 0, -6.66134e-16 - 1.11022e-16j, 4.44089e-16 + 1.66533e-16j, -4.44089e-16 + 1.11022e-16j, -2.77556e-16 + 2.22045e-16j, -3.33067e-16;
    4.44089e-16 + 2.05208e-16j, 2.22045e-16 + 2.77556e-16j, -5.21438e-17j, 4.44089e-16 + 2.77556e-16j, -1.11022e-16 + 2.22045e-16j, 2.22045e-16 + 1.24492e-16j, -2.22045e-16 + 3.88578e-16j, -8.88178e-16 + 3.33067e-16j;
    8.88178e-16 + 4.44089e-16j, 5.55112e-16 + 2.22045e-16j, 3.33067e-16, -2.22045e-16 + 5.55112e-16j, 2.22045e-16 + 4.44089e-16j, -4.44089e-16 + 6.66134e-16j, -9.57836e-16 + 2.22045e-16j, -1.11022e-15 - 3.33067e-16j;
    -2.22045e-16 + 1.55431e-15j, 5.55112e-17 + 2.22045e-16j, 7.21645e-16j, 2.22045e-16 + 2.22045e-16j, -7.77156e-16 + 3.33067e-16j, -3.23403e-16 - 2.22045e-16j, -2.22045e-16 + 5.55112e-17j, -1.33227e-15;
    -1.55431e-15 + 1.66533e-15j, -8.88178e-16 + 7.77156e-16j, -5.55112e-16 + 4.44089e-16j, -5.55112e-16, -4.44089e-16, -6.66134e-16 + 3.33067e-16j, -1.05471e-15 + 3.33067e-16j, -1.88738e-15 - 4.44089e-16j
]
# ∟
FFT(D) =  # error: This vector should have more elements.
Z := [1; 1; 1]
myFFT(D) = [1; -0.5j; 0; 0.5j]
(a + 1j*b)/(c + 1j*d) expand → a/(c + d*1j) + (b/(c + d*1j))*1j
F_N^-1*F_N = [
    1, 5.62932e-17 - 1.26873e-17j, -1.7534e-17 - 2.40994e-17j, 1.67315e-16 - 9.10227e-17j, -1.11022e-16 - 1.0371e-16j, -1.46598e-17 + 6.1633e-17j, -1.48999e-16 + 3.14118e-17j, -1.46598e-17 - 4.42899e-16j;
    -2.77556e-17j, 1, -7.7212e-17 - 1.39479e-18j, -5.55112e-17 - 6.245e-17j, -1.75241e-16 + 8.32667e-17j, -9.02056e-17 - 6.93889e-17j, -2.4538e-16 - 2.73371e-16j, 1.11022e-16 - 2.84495e-16j;
    5.55112e-17, -2.42212e-17 + 2.74667e-17j, 1, 6.58545e-17 - 1.41667e-17j, 1.249e-16j, -1.14557e-16 + 1.25189e-16j, 1.11022e-16 - 1.38641e-16j, -2.42212e-17 - 2.07878e-16j;
    2.77556e-17j, 9.71445e-17 + 6.93889e-18j, 3.42859e-17 - 5.69059e-17j, 1, 2.41093e-16, -5.55112e-17 - 1.38778e-17j, 3.13476e-16 - 5.13268e-17j, 2.28983e-16 - 1.66533e-16j;
    0, -7.32618e-17 - 2.45327e-18j, -2.94392e-17 - 1.13523e-17j, -3.03101e-18 - 3.49709e-17j, 1, 1.55687e-16 + 6.21736e-17j, -8.15831e-17 - 1.13523e-17j, -1.62661e-16 - 3.02088e-17j;
    1.38778e-17, 7.63278e-17 + 2.08167e-17j, 6.38098e-17 - 9.57497e-17j, -1.11022e-16 + 6.93889e-18j, 7.80961e-17 + 8.32667e-17j, 1, 1.62588e-16 + 2.35712e-17j, -1.38778e-17 + 3.33067e-16j;
    -1.38778e-17, -4.87641e-17 - 9.41857e-17j, -1.11022e-16 - 2.20247e-17j, 1.45909e-16 - 9.41857e-17j, -8.32667e-17 - 1.94289e-16j, -6.74702e-18 + 8.03079e-17j, 1, -6.26419e-17 - 2.95879e-18j;
    1.38778e-17j, -3.46945e-17j, -1.3143e-16 + 7.07837e-17j, -6.93889e-17 - 3.46945e-17j, -1.90484e-17 - 5.55112e-17j, -4.85723e-17 - 5.55112e-17j, -8.16447e-18 + 5.13268e-17j, 1
]
numer(a/(c + d*1j) + (b/(c + d*1j))*1j) → a*c + b*d - a*d*1j + b*c*1j
myFFT(Z) =  # error: This value must be an integer.
denom*(a/(c + d*1j) + (b/(c + d*1j))*1j) → denom*(a/(c + d*1j) + (b/(c + d*1j))*1j)
FFT(Z) =  # error
d := 0 = 0
f(t) := 3*cos(2*π*20*Hz*t + 30*°) + 4*cos(2*π*30*Hz*t + 45*°) + 2*cos(2*π*60*Hz*t + 120*°) + 5
gcd(20, 30, 60) = 10
T := 1/(10 Hz) = 100 ms
N := 2^4
n := 0 .. N - 1
Δt := T/N
d[n] := f(n*Δt)
f_s := 1/Δt = 160 Hz
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# [component: inputs d]
myFFT(LE) =  # error: This variable is undefined.
f_0 := 1/T
FFT(d) = [
    [5, 0]; [1.90779e-12, 0]; [1.5, 30]; [2, 45]; [9.93014e-16, 0]; [1.34907e-12, 0]; [1, 120]; [1.98637e-12, 0]; [1.33227e-15, 0]
] ∠
F := CFFT(d) = [
    [5, 0]; [8.89911e-16, 0]; [1.5, 30]; [2, 45]; [1.11022e-15, 0]; [7.4476e-16, 0]; [1, 120]; [1.0721e-15, 0]; [8.88178e-16, 0]; [1.19187e-15, 0]; [1, -120]; [7.02167e-16, 0]; [1.11022e-15, 0]; [2, -45]; [1.5, -30]; [9.69461e-16, 0]
] ∠
myFFT(d) = [
    [5, 0]; [9.11324e-16, 0]; [1.5, 30]; [2, 45]; [1.11022e-15, 0]; [6.47366e-16, 0]; [1, 120]; [1.35858e-15, 0]; [8.88178e-16, 0]; [1.10324e-15, 0]; [1, -120]; [8.45521e-16, 0]; [1.11022e-15, 0]; [2, -45]; [1.5, -30]; [7.479e-16, 0]
] ∠
FF := recenter(F)
F[.*N] = 5
F[.*N] = 5
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F_N = [
    [1, 0], [1, 0], [1, 0], [1, 0], [1, 0], [1, 0], [1, 0], [1, 0];
    [1, 0], [1, -45], [1, -90], [1, -135], [1, -180], [1, 135], [1, 90], [1, 45];
    [1, 0], [1, -90], [1, -180], [1, 90], [1, 5.08889e-14], [1, -90], [1, -180], [1, 90];
    [1, 0], [1, -135], [1, 90], [1, -45], [1, -180], [1, 45], [1, -90], [1, 135];
    [1, 0], [1, -180], [1, 5.08889e-14], [1, -180], [1, 1.01778e-13], [1, -180], [1, 1.52667e-13], [1, -180];
    [1, 0], [1, 135], [1, -90], [1, 45], [1, -180], [1, -45], [1, 90], [1, -135];
    [1, 0], [1, 90], [1, -180], [1, -90], [1, 1.52667e-13], [1, 90], [1, -180], [1, -90];
    [1, 0], [1, 45], [1, 90], [1, 135], [1, -180], [1, -135], [1, -90], [1, -45]
] ∠
F_N = [
    1, 1, 1, 1, 1, 1, 1, 1;
    1, 0.707107 - 0.707107j, -1j, -0.707107 - 0.707107j, -1, -0.707107 + 0.707107j, 1j, 0.707107 + 0.707107j;
    1, -1j, -1, 1j, 1, -1j, -1, 1j;
    1, -0.707107 - 0.707107j, 1j, 0.707107 - 0.707107j, -1, 0.707107 + 0.707107j, -1j, -0.707107 + 0.707107j;
    1, -1, 1, -1, 1, -1, 1, -1;
    1, -0.707107 + 0.707107j, -1j, 0.707107 + 0.707107j, -1, 0.707107 - 0.707107j, 1j, -0.707107 - 0.707107j;
    1, 1j, -1, -1j, 1, 1j, -1, -1j;
    1, 0.707107 + 0.707107j, 1j, -0.707107 + 0.707107j, -1, -0.707107 - 0.707107j, -1j, 0.707107 - 0.707107j
]
F_N
F_N
myFFT(d) = [5; -9.04091e-16 - 1.14585e-16j; 1.29904 + 0.75j; 1.41421 + 1.41421j; -8.88178e-16 - 6.66134e-16j; -3.33067e-16 - 5.55112e-16j; -0.5 + 0.866025j; 5.1094e-16 - 1.25884e-15j; 8.88178e-16; 4.60002e-16 + 1.00276e-15j; -0.5 - 0.866025j; -3.33067e-16 + 7.77156e-16j; -8.88178e-16 + 6.66134e-16j; 1.41421 - 1.41421j; 1.29904 - 0.75j; -7.32984e-16 + 1.48621e-16j]
F = [5; -8.88178e-16 - 5.55112e-17j; 1.29904 + 0.75j; 1.41421 + 1.41421j; -8.88178e-16 - 6.66134e-16j; -3.33067e-16 - 6.66134e-16j; -0.5 + 0.866025j; 3.88578e-16 - 9.99201e-16j; 8.88178e-16; 5.55112e-16 + 1.05471e-15j; -0.5 - 0.866025j; -2.22045e-16 + 6.66134e-16j; -8.88178e-16 + 6.66134e-16j; 1.41421 - 1.41421j; 1.29904 - 0.75j; -9.4369e-16 + 2.22045e-16j]
d = [9.4265; 3.72809; 1.23205; -1.36036; 6.23035; 8.4367; 4.76795; 6.13411; 3.76965; 6.78955; 9.23205; 1.7011; 0.573497; 1.04566; 4.76795; 13.5251]
d =  # no stored result
d = [9.4265; 3.72809; 1.23205; -1.36036; 6.23035; 8.4367; 4.76795; 6.13411; 3.76965; 6.78955; 9.23205; 1.7011; 0.573497; 1.04566; 4.76795; 13.5251]
FFT(14.33) =  # error: This value must be a vector of scalar elements.
d := 0 = 0
f(t) := 3*cos(2*π*20*Hz*t + 30*°) + 4*cos(2*π*30*Hz*t + 45*°) + 2*cos(2*π*60*Hz*t + 120*°) + 5*cos(2*π*46*Hz*t + 37.33*°) + 5
ma := [5; 3; 4; 2; 5]
fr := [0; 20; 30; 60; 47]
ph := [0; 30; 45; 120; 37.33]*°
f(t) := sum(ma[k]*cos(2*π*(fr[k]*Hz)*t + ph[k]), k = 0 .. last(ma))
k := 0 .. 4
ac := submatrix(fr, 1, rows(fr) - 1, 0, 0)
gc := gcd(ac) = 1
T := 1/(gc*Hz) = 1000 ms
f_sMin := max(fr*2)*Hz = 120 1/s
Δt_max := 1/f_sMin = 0.00833333 s
m := ceil(log(T/Δt_max, 2)) = 7
N := 2^m = 128
Δt := T/N
n := 0 .. N - 1
d[n] := f(Δt*n)
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F := CFFT(d)
dataset := stack([m], d)  # stack
# [component: inputs dataset]
f_0 := 1/T
FF := recenter(F)
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(5 ∠ 35) + (5 ∠ (-135)) = [0.871557, -50] ∠
a := 5 ∠ 35
b := 5 ∠ 125
a = 4.09576 + 2.86788j
b = -2.86788 + 4.09576j
a + b = 1.22788 + 6.96364j
a + b = [7.07107, 80] ∠
pt := transpose([0, a, a + b, b, 0, a + b])
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ω := e^(-1j*2*π/N)
pt[n] := ω^n
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myFFT(LE) =  # error
